0.04 ; IIV TVCL
0.04 ; IIV TVV2
0.04 ; IIV TVKA
0.04 ; IIV TVCLM
0.04 ; IIV TVV3
0.04 ; IIV TVFM
$PROB
$INPUT C ID TIME EVID CMT AMT DV MDV II ADDL SEX AGE WT TYPE

$DATA NM_dat.csv IGNORE=C
$SUBROUTINES ADVAN13 TOL=5

$MODEL
  COMP(DEPOT,DEFDOS)
  COMP(CENTPRNT,DEFOBS)
  COMP(METABOLITE)

$PK

    TVCL = THETA(1)
     CL = TVCL * EXP(ETA(1))

    TVV2 = THETA(2)
     V2 = TVV2

    TVKA = THETA(3)
     KA = TVKA

	KPM = CL/V2

	TVCLM = THETA(4)
	 CLM = TVCLM * EXP(ETA(2))

	TVV3  = THETA(5)
	 V3 = TVV3

	TVFM = THETA(6)
	FM = TVFM

$DES
  DADT(1) = -KA*A(1)
  DADT(2) =  KA*A(1) - CL/V2*A(2)
  DADT(3) =  FM*KPM*A(2)- CLM/V3*A(3)

$ERROR
$ERROR

    CP = A(2)/V2*1000

    CM = A(3)/V3*1000

  IF (TYPE.EQ.2) IPRED = CP
  IF (TYPE.EQ.3) IPRED = CM

  IF (TYPE.EQ.2) W = SQRT(THETA(7)**2 * IPRED**2 + THETA(8)**2)
  IF (TYPE.EQ.3) W = SQRT(THETA(9)**2 * IPRED**2 + THETA(10)**2)

  Y = IPRED + W*EPS(1)
  IRES = DV-IPRED
  IWRES = IRES/W

$THETA
(0, 3.42)
(0, 31.1)
(0, 0.3) FIX
(0, 3.75)
(0, 2.23)
(0, 1) FIX
(0, 0.348)
(0, 14.6)
(0, 0.311)
(0, 21)

$OMEGA
$SIGMA
 1 FIX
 1 FIX

$ESTIMATION METHOD=1 INTER MAXEVAL=99999 SLOW NOABORT PRINT=10 SIG=3
$TABLE ID TIME DV MDV PRED IPRED CWRES CIWRES EVID CMT AMT II ADDL SEX AGE WT TYPE ONEHEADER NOPRINT NOAPPEND FILE=sdtab32 FORMAT=s1PE14.7
$TABLE ID CL V2 KA CLM V3 FM ETA1 ETA2 NOPRINT NOAPPEND ONEHEADER FILE=patab32
$TABLE ID ETA1 ETA2 FIRSTONLY NOAPPEND NOPRINT FILE=run32.ETA
$TABLE ID SEX TYPE CMT EVID MDV FIRSTONLY NOPRINT NOAPPEND ONEHEADER FILE=catab32
$TABLE ID WT AGE AMT FIRSTONLY NOPRINT NOAPPEND ONEHEADER FILE=cotab32
