Fri May  8 11:24:31 CST 2026
;; 1. Based on: run33
;; 2. Description: PK Basic model QC FIX_add
;; x1. Author: DUXACT
;; 3. Label:
$PROBLEM
$INPUT      C ID CYCLE DAY=DROP TIME NTIME=DROP DV AMT RATE DUR CMT
            DOSE MDV EVID BQL TYPE STUDY SEX WT AGE
$DATA      NM_dat_new.csv IGNORE=C
$SUBROUTINE ADVAN3 TRANS4
$PK
D1=DUR
CL = THETA(1) * EXP(ETA(1))
V1 = THETA(2) * EXP(ETA(2))
Q  = THETA(3) * EXP(ETA(3))
V2 = THETA(4) * EXP(ETA(4))
S1 = V1/1000 ; AMT unit:mg ; V output unit: L ; DV unit:ng/mL

$ERROR
IPRED = F
    W = SQRT(THETA(5)**2*IPRED**2 + THETA(6)**2)
    Y = IPRED + W*EPS(1)
 IRES = DV-IPRED
IWRES = IRES/W

$THETA  (0,0.0122) ; CL_L/h
 (0,4.36) ; V1_L
 (0,0.0207) ; Q_L/h
 (0,2) ; V2_L
 (0,0.141) ; Prop.RE (sd)
 0 FIX ; Add.RE (sd)
$OMEGA  0.222  ;     IIV CL
 0.0521  ;     IIV V1
 0  FIX  ;      IIV Q
 0  FIX  ;     IIV V2
$SIGMA  1  FIX  ; Proportional error PK
$ESTIMATION METHOD=1 INTER MAXEVAL=9999 NOABORT SIG=3 PRINT=10
; Xpose
$COVARIANCE
$TABLE      ID TIME DV MDV PRED IPRED CWRES CIWRES STUDY ONEHEADER
            NOPRINT NOAPPEND FILE=SDTAB38 FORMAT=s1PE14.7
$TABLE      ID CL V1 Q V2 ETA1 ETA2 ETA3 ETA4 NOPRINT NOAPPEND
            ONEHEADER FILE=PATAB38
$TABLE      ID ETA1 ETA2 ETA3 ETA4 FIRSTONLY NOAPPEND NOPRINT
            FILE=00038.ETA
$TABLE      ID WT SEX STUDY NOPRINT NOAPPEND ONEHEADER FILE=CATAB38
$TABLE      ID AGE NOPRINT NOAPPEND ONEHEADER FILE=COTAB38

NM-TRAN MESSAGES
 WARNINGS AND ERRORS (IF ANY) FOR PROBLEM    1
 (WARNING  2) NM-TRAN INFERS THAT THE DATA ARE POPULATION.
Note: Analytical 2nd Derivatives are constructed in FSUBS but are never used.
      You may insert $ABBR DERIV2=NO after the first $PROB to save FSUBS construction and compilation time

1NONLINEAR MIXED EFFECTS MODEL PROGRAM (NONMEM) VERSION 7.6.0 (nm760)
 ORIGINALLY DEVELOPED BY STUART BEAL, LEWIS SHEINER, AND ALISON BOECKMANN
 CURRENT DEVELOPERS ARE ROBERT BAUER, ICON DEVELOPMENT SOLUTIONS,
 AND ALISON BOECKMANN. IMPLEMENTATION, EFFICIENCY, AND STANDARDIZATION
 PERFORMED BY NOUS INFOSYSTEMS.
 PROBLEM NO.:         1

 TOT. NO. OF OBS RECS:      397
 TOT. NO. OF INDIVIDUALS:       40
 TWO COMPARTMENT MODEL (ADVAN3)
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 #TBLN:      1
 #METH: First Order Conditional Estimation with Interaction
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
 #TERM:
0MINIMIZATION SUCCESSFUL
 HOWEVER, PROBLEMS OCCURRED WITH THE MINIMIZATION.
 REGARD THE RESULTS OF THE ESTIMATION STEP CAREFULLY, AND ACCEPT THEM ONLY
 AFTER CHECKING THAT THE COVARIANCE STEP PRODUCES REASONABLE OUTPUT.
 NO. OF FUNCTION EVALUATIONS USED:      139
 NO. OF SIG. DIGITS IN FINAL EST.:  3.4

 ETABAR IS THE ARITHMETIC MEAN OF THE ETA-ESTIMATES,
 AND THE P-VALUE IS GIVEN FOR THE NULL HYPOTHESIS THAT THE TRUE MEAN IS 0.

 ETABAR:         6.3353E-03 -4.0441E-03  0.0000E+00  0.0000E+00
 SE:             7.1466E-02  3.3757E-02  0.0000E+00  0.0000E+00
 N:                      40          40          40          40

 P VAL.:         9.2936E-01  9.0464E-01  1.0000E+00  1.0000E+00

 ETASHRINKSD(%)  3.9694E+00  6.4898E+00  0.0000E+00  0.0000E+00
 ETASHRINKVR(%)  7.7812E+00  1.2558E+01  0.0000E+00  0.0000E+00
 EBVSHRINKSD(%)  3.4315E+00  6.5345E+00  0.0000E+00  0.0000E+00
 EBVSHRINKVR(%)  6.7453E+00  1.2642E+01  0.0000E+00  0.0000E+00
 RELATIVEINF(%)  9.3236E+01  8.7340E+01  0.0000E+00  0.0000E+00
 EPSSHRINKSD(%)  9.0548E+00
 EPSSHRINKVR(%)  1.7290E+01


 TOTAL DATA POINTS NORMALLY DISTRIBUTED (N):          397
 N*LOG(2PI) CONSTANT TO OBJECTIVE FUNCTION:    729.63719536451015
 OBJECTIVE FUNCTION VALUE WITHOUT CONSTANT:    7665.4976659175272
 OBJECTIVE FUNCTION VALUE WITH CONSTANT:       8395.1348612820366
 REPORTED OBJECTIVE FUNCTION DOES NOT CONTAIN CONSTANT

 TOTAL EFFECTIVE ETAS (NIND*NETA):                            80


 #TERE:
 Elapsed estimation  time in seconds:     0.32
 Elapsed covariance  time in seconds:     0.27
 Elapsed postprocess time in seconds:     0.01

 ********************               FIRST ORDER CONDITIONAL ESTIMATION WITH INTERACTION              ********************
 #OBJT:**************                       MINIMUM VALUE OF OBJECTIVE FUNCTION                      ********************
 #OBJV:********************************************          7665.498       *********************************************

 ********************               FIRST ORDER CONDITIONAL ESTIMATION WITH INTERACTION              ********************
 ********************                             FINAL PARAMETER ESTIMATE                           ********************

 THETA - VECTOR OF FIXED EFFECTS PARAMETERS   *********
         TH 1      TH 2      TH 3      TH 4      TH 5      TH 6
         1.22E-02  4.36E+00  2.07E-02  2.00E+00  1.41E-01  0.00E+00

 OMEGA - COV MATRIX FOR RANDOM EFFECTS - ETAS  ********
         ETA1      ETA2      ETA3      ETA4
 ETA1
+        2.22E-01
 ETA2
+        0.00E+00  5.21E-02
 ETA3
+        0.00E+00  0.00E+00  0.00E+00
 ETA4
+        0.00E+00  0.00E+00  0.00E+00  0.00E+00

 SIGMA - COV MATRIX FOR RANDOM EFFECTS - EPSILONS  ****
         EPS1
 EPS1
+        1.00E+00

 OMEGA - CORR MATRIX FOR RANDOM EFFECTS - ETAS  *******
         ETA1      ETA2      ETA3      ETA4
 ETA1
+        4.71E-01
 ETA2
+        0.00E+00  2.28E-01
 ETA3
+        0.00E+00  0.00E+00  0.00E+00
 ETA4
+        0.00E+00  0.00E+00  0.00E+00  0.00E+00

 SIGMA - CORR MATRIX FOR RANDOM EFFECTS - EPSILONS  ***
         EPS1
 EPS1
+        1.00E+00

 ********************               FIRST ORDER CONDITIONAL ESTIMATION WITH INTERACTION              ********************
 ********************                            STANDARD ERROR OF ESTIMATE                          ********************

 THETA - VECTOR OF FIXED EFFECTS PARAMETERS   *********
         TH 1      TH 2      TH 3      TH 4      TH 5      TH 6
         8.19E-04  1.65E-01  3.14E-03  2.29E-01  1.31E-02 .........

 OMEGA - COV MATRIX FOR RANDOM EFFECTS - ETAS  ********
         ETA1      ETA2      ETA3      ETA4
 ETA1
+        8.46E-02
 ETA2
+       .........  1.12E-02
 ETA3
+       ......... ......... .........
 ETA4
+       ......... ......... ......... .........

 SIGMA - COV MATRIX FOR RANDOM EFFECTS - EPSILONS  ****
         EPS1
 EPS1
+       .........

 OMEGA - CORR MATRIX FOR RANDOM EFFECTS - ETAS  *******
         ETA1      ETA2      ETA3      ETA4
 ETA1
+        8.99E-02
 ETA2
+       .........  2.45E-02
 ETA3
+       ......... ......... .........
 ETA4
+       ......... ......... ......... .........

 SIGMA - CORR MATRIX FOR RANDOM EFFECTS - EPSILONS  ***
         EPS1
 EPS1
+       .........
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 Elapsed finaloutput time in seconds:     0.01
 #CPUT: Total CPU Time in Seconds,        0.646
